fr(Rx) := 1/2*E*(Rx - R0)/(Rx + R0)  # error: Эта переменная не определена.
fn(Rx) := k*Rx + b  # error: Эта переменная не определена.
d/dRx(1/2*E*(Rx - R0)/(Rx + R0)) → E/(2*R0 + 2*Rx) + 2*E*(R0 - Rx)/(2*R0 + 2*Rx)^2
d^2/dRx^2(1/2*E*(Rx - R0)/(Rx + R0)) → -4*E/(2*R0 + 2*Rx)^2 - 8*E*(R0 - Rx)/(2*R0 + 2*Rx)^3
d^3/dRx^3(1/2*E*(Rx - R0)/(Rx + R0)) → 24*E/(2*R0 + 2*Rx)^3 + 48*E*(R0 - Rx)/(2*R0 + 2*Rx)^4
d^4/dRx^4(1/2*E*(Rx - R0)/(Rx + R0)) → -192*E/(2*R0 + 2*Rx)^4 - 384*E*(R0 - Rx)/(2*R0 + 2*Rx)^5
Dr := 1000
k := 0.0005
δx := 0.02
Rx0 := 1
E := 1
b := 1
Tcheb4(z) := z^4 - z^2 + 0.125
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Given
48/Dr^2*((-4*E/(2*Rx0 + 2*Rx0)^2 - 8*E*(Rx0 - Rx0)/(2*Rx0 + 2*Rx0)^3) - k)/(-192*E/(2*Rx0 + 2*Rx0)^4 - 384*E*(Rx0 - Rx0)/(2*Rx0 + 2*Rx0)^5) == -1
Dr^4/(384*k)*(-192*E/(2*Rx0 + 2*Rx0)^4 - 384*E*(Rx0 - Rx0)/(2*Rx0 + 2*Rx0)^5)*0.125 == δx
24*E/(2*Rx0 + 2*Rx0)^3 + 48*E*(Rx0 - Rx0)/(2*Rx0 + 2*Rx0)^4 == 0
E/(2*Rx0 + 2*Rx0) + 2*E*(Rx0 - Rx0)/(2*Rx0 + 2*Rx0)^2 - k == 0
384/Dr^4*((1/2*E*(Rx0 - Rx0)/(Rx0 + Rx0)) - k*Rx0 - b)/(-192*E/(2*Rx0 + 2*Rx0)^4 - 384*E*(Rx0 - Rx0)/(2*Rx0 + 2*Rx0)^5) == 0.125
[Rx0; E] := Minerr(Rx0, E) = [0.363724; 4.48977e-12]
b := -k*Rx0
fr(Rx) := 1/2*E*(Rx - Rx0)/(Rx + Rx0)
fn(Rx) := k*Rx + b
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