fr(Rx) := 1/2*E*(Rx - R0)/(Rx + R0)
fn(Rx) := k*Rx + b
d/dRx(1/2*E*(Rx - R0)/(Rx + R0)) → E/(2*R0 + 2*Rx) + 2*E*(R0 - Rx)/(2*R0 + 2*Rx)^2
d^2/dRx^2(1/2*E*(Rx - R0)/(Rx + R0)) → -4*E/(2*R0 + 2*Rx)^2 - 8*E*(R0 - Rx)/(2*R0 + 2*Rx)^3
d^3/dRx^3(1/2*E*(Rx - R0)/(Rx + R0)) → 24*E/(2*R0 + 2*Rx)^3 + 48*E*(R0 - Rx)/(2*R0 + 2*Rx)^4
d^4/dRx^4(1/2*E*(Rx - R0)/(Rx + R0)) → -192*E/(2*R0 + 2*Rx)^4 - 384*E*(R0 - Rx)/(2*R0 + 2*Rx)^5
Dr := 500  # Rx0 □ -50
E := -50
b := -50
k := 0.002
δx := 0.02
L4(z) := z^4 - (5/7)*z^2 + 3/35
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Given
48/Dr^2*((-4*E/(2*Rx0 + 2*Rx0)^2 - 8*E*(Rx0 - Rx0)/(2*Rx0 + 2*Rx0)^3) - k)/(-192*E/(2*Rx0 + 2*Rx0)^4 - 384*E*(Rx0 - Rx0)/(2*Rx0 + 2*Rx0)^5) == -(5/7)
Dr^4/(384*k)*(-192*E/(2*Rx0 + 2*Rx0)^4 - 384*E*(Rx0 - Rx0)/(2*Rx0 + 2*Rx0)^5)*0.371 == δx
24*E/(2*Rx0 + 2*Rx0)^3 + 48*E*(Rx0 - Rx0)/(2*Rx0 + 2*Rx0)^4 == 0
E/(2*Rx0 + 2*Rx0) + 2*E*(Rx0 - Rx0)/(2*Rx0 + 2*Rx0)^2 - k == 0
384/Dr^4*((1/2*E*(Rx0 - Rx0)/(Rx0 + Rx0)) - k*Rx0 - b)/(-192*E/(2*Rx0 + 2*Rx0)^4 - 384*E*(Rx0 - Rx0)/(2*Rx0 + 2*Rx0)^5) == 3/35
({
    while b < 10
        Rx0 ← Rx0 + 1
        break if fr(-2) == fn(-2) and fr(2) == fn(2)
        E ← E + 1
        break if fr(-2) == fn(-2) and fr(2) == fn(2)
        b ← b + 1
        break if fr(-2) == fn(-2) and fr(2) == fn(2)
    Rx0, E, b
})
Rx0 =  # error: Эта переменная не определена.
E = -50
b = -50
[Rx0; E] := Minerr(Rx0, E)
b := -k*Rx0
fr(Rx) := 1/2*E*(Rx - Rx0)/(Rx + Rx0)
fn(Rx) := k*Rx + b
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