fr(Rx) := 1/2*E*(Rx - R0)/(Rx + R0)  # error: Эта переменная не определена.
fn(Rx) := k*Rx + b  # error: Эта переменная не определена.
d/dRx(1/2*E*(Rx - R0)/(Rx + R0)) → E/(2*R0 + 2*Rx) + 2*E*(R0 - Rx)/(2*R0 + 2*Rx)^2
d^2/dRx^2(1/2*E*(Rx - R0)/(Rx + R0)) → -4*E/(2*R0 + 2*Rx)^2 - 8*E*(R0 - Rx)/(2*R0 + 2*Rx)^3
d^3/dRx^3(1/2*E*(Rx - R0)/(Rx + R0)) → 24*E/(2*R0 + 2*Rx)^3 + 48*E*(R0 - Rx)/(2*R0 + 2*Rx)^4
Dr := 500
Rx0 := 100
E := 0.01
b := 1
k := 0.002
δx := 0.02
L3(z) := z^3 - 0.6*z
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Given
24/Dr^2*((E/(2*Rx0 + 2*Rx0) + 2*E*(Rx0 - Rx0)/(2*Rx0 + 2*Rx0)^2) - k)/(24*E/(2*Rx0 + 2*Rx0)^3) == -0.6
Dr^3/(38*k)*(24*E/(2*Rx0 + 2*Rx0)^3)*0.4 == δx
[Rx0; E] := Minerr(Rx0, E) = [9933.52; 79.4606]
b := -k*Rx0
fr(Rx) := 1/2*E*(Rx - Rx0)/(Rx + Rx0)
fn(Rx) := k*Rx + b
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ypr(Rx) := fr(Rx) - fn(Rx)
MRx0 := (10 + (-10))/2 = 0
σRx0 := (10 - (-10))/(2*sqrt(6))
d/dRx0(1/2*E*(Rx - Rx0)/(Rx + Rx0)) → -39.7303084706/(Rx + 9933.52080213) - (39.7303084706*Rx - 394661.845668)/(Rx + 9933.52080213)^2
ψRx0(Rx) := (1/k)*(-39.7303084706/(Rx + 9933.52080213) - (39.7303084706*Rx - 394661.845668)/(Rx + 9933.52080213)^2)
ψRx0(Rx) → -19865.1542353/(Rx + 9933.52080213) - (19865.1542353*Rx - 197330922.834)/(Rx + 9933.52080213)^2
sumM(Rx) := 2*MRx0*ψRx0(Rx)
sumM(Rx) → 0
sumσ(Rx) := sqrt(2*σRx0^2*ψRx0(Rx)^2)
sumσ(Rx) → sqrt(100*(-19865.1542353/(Rx + 9933.52080213) - (19865.1542353*Rx - 197330922.834)/(Rx + 9933.52080213)^2)^2/3)
ytpplus(Rx) := ypr(Rx) + sumM(Rx) + 2*sumσ(Rx)
ytpminus(Rx) := ypr(Rx) + sumM(Rx) - 2*sumσ(Rx)
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