k1 := 1
k2 := 10^3
k3 := 10^-3
k4 := 2
k5 := 0.1
k6 := 10^3
k7 := 10
T1 := 0.2
k8 := 10
T3 := 0.5
T5 := 0.3
W6(p) := k6 → 1000
W1(p) := k1/(p*T1 + 1)
W7(p) := k7 → 10
W8(p) := k8 → 10
W2(p) := k2
W3(p) := k3/(p*T3)
W4(p) := k4
W5(p) := k5/(p*T5 + 1)
K_z := 10
Wz1(p) := W2(p)*W3(p)*W4(p)*W8(p)/((1 + W3(p)*W4(p)*W7(p)*W6(p)*W5(p))*K_z) → 40.0/(p*(40.0/(p*(0.3*p + 1)) + 10))
Wz2(p) := W3(p)*W4(p)*W8(p)/((1 + W3(p)*W4(p)*W7(p)*W6(p)*W5(p))*K_z) → 0.04/(p*(40.0/(p*(0.3*p + 1)) + 10))
p(ω) := ω*1i
Wz1(p(ω)) → 40.0i/(ω*(40.0i/(ω*(0.3i*ω + 1)) - 10))
Wz2(p(ω)) → 0.04i/(ω*(40.0i/(ω*(0.3i*ω + 1)) - 10))
S_ξ1(ω) := 10^-7
S_ξ2(ω) := 0.16/(1 + 0.16*ω^2)
S_Δ(ω) := (|Wz1(ω*1i)|^2*S_ξ1(ω) + |Wz2(ω*1i)|^2*S_ξ2(ω))/K_z^2 → 0.0000016/(|40.0i/(ω*(0.3i*ω + 1)) - 10|^2*|ω|^2) + 0.00000256/(|40.0i/(ω*(0.3i*ω + 1)) - 10|^2*|ω|^2*(0.16*ω^2 + 1))
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σ2 := (integral(|Wz1(ω*1i)|^2*S_ξ1(ω), ω = 0 .. ∞) + integral(|Wz2(ω*1i)|^2*S_ξ2(ω), ω = 0 .. ∞))/(π*K_z^2) = 6.93165e-9
# Графики исходных помех
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mod1(ω) := Re(Wz1(ω))^2 + Im(Wz1(ω))^2
mod2(ω) := Re(Wz2(ω))^2 + Im(Wz2(ω))^2
# АЧХ помехи
A1(ω) := sqrt(mod1(ω))
A2(ω) := sqrt(mod2(ω))
# Графики АЧХ
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φ2(ω) := arg(Wz2(ω*1i))
φ1(ω) := arg(Wz1(ω*1i))
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U2(ω) := Re(Wz2(ω*1i))
U1(ω) := Re(Wz1(ω*1i))
V2(ω) := Im(Wz2(ω*1i))
V1(ω) := Im(Wz1(ω*1i))
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